# 1. Исходные данные для статистического анализа
f(x, a, b) := Γ(a + b)*x^(a - 1)*(1 - x)^(b - 1)/(Γ(a)*Γ(b))
F(x, a, b) := integral(f(x, a, b), x = 0 .. x)
N0 := 10000
k := 0 .. N0 - 1
a := 0
b := 1
Y := runif(N0, a, b)
invar(r) := root(F(t, 3, 10) - r, t, 0, 1)
X[k] := invar(Y[k])
X := sort(X)
N(t) :=
    i ← 0
    while t > X[i]
        i ← i + 1
    N0 - i
h := 0.5
Tmax := round(max(X)/h, 0)
i := 0 .. Tmax
T[i] := i*h
i := 0 .. Tmax - 1
# 2. Функция надежности
P1[i] := N(T[i])/N0
P1[Tmax] := 0
P(t, a, b) := 1 - F(t, a, b)
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# 3. Функция ненадежности
Q1[i] := (N0 - N(T[i]))/N0
Q(t, a, b) := F(t, a, b)
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# 4. Функция частоты
i := 0 .. Tmax - 2
f1[i] := (N(T[i]) - N(T[i] + h))/(N0*h)  # error: Индекс массива является недопустимым для этого массива.
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# 5. Функция интенсивности
i := 0 .. Tmax - 2
λ(t, a, b) := f(t, a, b)/P(t, a, b)
λ1[i] := (N(T[i]) - N(T[i] + h))/(N(T[i])*h)  # error: Индекс массива является недопустимым для этого массива.
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